*Heading
** Job name: Lbracket3d Model name: Model-1
** Generated by: Abaqus/CAE 2022
*Preprint, echo=NO, model=NO, history=NO, contact=NO
**
** PARTS
**
*Part, name=Part-1
*Node
      1,          96.,           0.,           0.
      2,          94.,           0.,           0.
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*Element, type=C3D8R
   1,    32,   530,   531,   443,  2061,  2559,  2560,  2472
   2,   530,   529,   532,   531,  2559,  2558,  2561,  2560
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*Nset, nset=_PickedSet5, internal, generate
     1,  12174,      1
*Elset, elset=_PickedSet5, internal, generate
    1,  9640,     1
** Section: Section-1
*Solid Section, elset=_PickedSet5, material=Material-1
,
*End Part
**
**
** ASSEMBLY
**
*Assembly, name=Assembly
**
*Instance, name=Part-1-1, part=Part-1
*End Instance
**
*Nset, nset=DirichletBC, instance=Part-1-1
    65,    66,    67,    68,    69,    70
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*Nset, nset=NeumannBC, instance=Part-1-1
   105,   106,   519,  2134,  2135,  2548
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*End Assembly
**
** MATERIALS
**
*Material, name=Material-1
*Elastic
119000., 0.34
**
** BOUNDARY CONDITIONS
**
** Name: BC-1 Type: Symmetry/Antisymmetry/Encastre
*Boundary
DirichletBC, ENCASTRE
** ----------------------------------------------------------------
**
** STEP: Step-1
**
*Step, name=Step-1, nlgeom=NO
*Static
1., 1., 1e-05, 1.
**
** LOADS
**
** Name: Load-1   Type: Concentrated force
*Cload
NeumannBC, 2, -1.
**
** OUTPUT REQUESTS
**
*Restart, write, frequency=0
**
** FIELD OUTPUT: F-Output-1
**
*Output, field, variable=PRESELECT
**
** HISTORY OUTPUT: H-Output-1
**
*Output, history, variable=PRESELECT
*End Step
