*Heading
** Job name: Cantilever_3D Model name: Model-1
** Generated by: Abaqus/CAE 2022
*Preprint, echo=NO, model=NO, history=NO, contact=NO
**
** PARTS
**
*Part, name=PART-1
*Node
      1,          -5.,          -5.,          50.
      2,          -5.,          -4.,          50.
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*Element, type=C3D8
   1,  562,  563,  574,  573,    1,    2,   13,   12
   2,  563,  564,  575,  574,    2,    3,   14,   13
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*Nset, nset=_PickedSet12, internal, generate
    1,  6171,     1
*Elset, elset=_PickedSet12, internal, generate
    1,  5000,     1
** Section: Section-1
*Solid Section, elset=_PickedSet12, material=Material-1
,
*End Part
**
**
** ASSEMBLY
**
*Assembly, name=Assembly
**
*Instance, name=PART-1-1, part=PART-1
*End Instance
**
*Nset, nset=LOAD, instance=PART-1-1
    1,    2,    3,    4,    5,    6
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*Nset, nset=_PickedSet8, internal, instance=PART-1-1
  551,  552,  553,  554,  555,  556
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*Elset, elset=_PickedSet8, internal, instance=PART-1-1
  491,  492,  493,  494,  495,  496
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*End Assembly
**
** MATERIALS
**
*Material, name=Material-1
*Elastic
119000., 0.3
** ----------------------------------------------------------------
**
** STEP: Step-1
**
*Step, name=Step-1, nlgeom=NO
*Static
1., 1., 1e-05, 1.
**
** BOUNDARY CONDITIONS
**
** Name: BC-1 Type: Symmetry/Antisymmetry/Encastre
*Boundary
_PickedSet8, ENCASTRE
**
** LOADS
**
** Name: Load-1   Type: Concentrated force
*Cload
LOAD, 2, -10.
**
** OUTPUT REQUESTS
**
*Restart, write, frequency=0
**
** FIELD OUTPUT: F-Output-1
**
*Output, field, variable=PRESELECT
**
** HISTORY OUTPUT: H-Output-1
**
*Output, history, variable=PRESELECT
*End Step
